*Heading
** Job name: twist20slowsteady Model name: twiststeady
** Generated by: Abaqus/CAE 6.13-1
*Preprint, echo=NO, model=NO, history=NO, contact=NO
**
** PARTS
**
*Part, name=Part-1
*Node
      1,         -1.5,           6.,           1.
      2,         -1.5,           7.,           1.
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*Element, type=C3D20H
  1,   55,  275,  620,  215,    1,   23,  197,   34,  929,  928,  927,  926,  930,  931,  932,
      933,  935,  934,  936,  937
  2,  275,  276,  621,  620,   23,   24,  198,  197,  940,  939,  938,  928,  941,  942,  943,
      931,  934,  944,  945,  936
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*Nset, nset=Set-1, generate
    1,  3305,     1
*Elset, elset=Set-1, generate
   1,  576,    1
** Section: Section-1
*Solid Section, elset=Set-1, material=VISC_OGDEN_2EL
,
*End Part
**
**
** ASSEMBLY
**
*Assembly, name=Assembly
**
*Instance, name=Part-1-1, part=Part-1
*End Instance
**
*Nset, nset=FIXED, instance=Part-1-1
   17,   18,   19,   20,   21,   22
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*Elset, elset=FIXED, instance=Part-1-1, generate
 193,  553,   24
*Elset, elset=_Surf-1_S3, internal, instance=Part-1-1
  97,  98,  99, 100, 113, 114
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*Surface, type=ELEMENT, name=Surf-1
_Surf-1_S3, S3
*Elset, elset=_Surf-2_S5, internal, instance=Part-1-1
 13, 14, 15, 16, 29, 30
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*Surface, type=ELEMENT, name=Surf-2
_Surf-2_S5, S5
*End Assembly
**
** MATERIALS
**
*Material, name=VISC_OGDEN_2EL
*Depvar
     12,
*User Material, constants=13
 0.00264829,    2.14787,    29.4616,  0.0643508,   0.416871,    61.3862,  0.0348339,    79.7108
 0.00113905,    3.52511,     29.054,    0.14663,    1060.99
** ----------------------------------------------------------------
**
** STEP: Step-1
**
*Step, name=Step-1, nlgeom=YES, inc=1000000
*Static
1e-08, 10., 1e-09, 0.1
**
** BOUNDARY CONDITIONS
**
** Name: BC-1 Type: Displacement/Rotation
*Boundary
FIXED, 1, 1
FIXED, 2, 2
FIXED, 3, 3
**
** LOADS
**
** Name: Load-1   Type: Pressure
*Dsload
Surf-1, P, 0.00015
** Name: Load-2   Type: Pressure
*Dsload
Surf-2, P, 0.00015
**
** OUTPUT REQUESTS
**
*Restart, write, frequency=0
**
** FIELD OUTPUT: F-Output-1
**
*Output, field, variable=PRESELECT
**
** HISTORY OUTPUT: H-Output-1
**
*Output, history, variable=PRESELECT
*End Step
** ----------------------------------------------------------------
**
** STEP: Step-2
**
*Step, name=Step-2, nlgeom=YES
*Static
0.1, 10., 0.0001, 0.1
**
** OUTPUT REQUESTS
**
*Restart, write, frequency=0
**
** FIELD OUTPUT: F-Output-1
**
*Output, field, variable=PRESELECT
**
** HISTORY OUTPUT: H-Output-1
**
*Output, history, variable=PRESELECT
*End Step
